*Heading
** Job name: Job-1 Model name: Model-1
** Generated by: Abaqus/CAE 6.11-3
*Preprint, echo=NO, model=NO, history=NO, contact=NO
**
** PARTS
**
*Part, name=Lower
*Node
      1,   18.8915272,  -4.63391103e-10,          -5.
      2,   18.8915272,  2.14708251e-10,          25.
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*Element, type=R3D4
1,   1,  25, 113,   5
2,  25,  26, 114, 113
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*Element, type=R3D3
 88,  47, 159,  10
 89,  18,  77, 157
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*Node
    200,           0.,           0.,          10.
*Nset, nset=Lower-RefPt_, internal
200,
*Nset, nset=Set-Lower
 200,
*Elset, elset=_Surf-Lower_SPOS, internal, generate
   1,  212,    1
*Surface, type=ELEMENT, name=Surf-Lower
_Surf-Lower_SPOS, SPOS
*Elset, elset=Lower, generate
   1,  212,    1
*End Part
**
*Part, name=LowerPlate
*Node
      1,         -90.,   15.6402998,          -5.
      2,          90.,   15.6402998,          -5.
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*Element, type=R3D4
 1,  1,  9, 30,  4
 2,  9, 10, 29, 30
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*Node
     79,           0.,   15.6402998,          10.
*Nset, nset=LowerPlate-RefPt_, internal
79,
*Nset, nset=Set-LowerPlate
 79,
*Elset, elset=_Surf-LowerPlate_SPOS, internal, generate
  1,  76,   1
*Surface, type=ELEMENT, name=Surf-LowerPlate
_Surf-LowerPlate_SPOS, SPOS
*Elset, elset=LowerPlate, generate
  1,  76,   1
*End Part
**
*Part, name=Model
*Node
      1,         -20.,          80.,           0.
      2,         -20.,   76.5217361,           0.
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*Element, type=C3D8R
   1,  169,  170,  194,  193,    1,    2,   26,   25
   2,  170,  171,  195,  194,    2,    3,   27,   26
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*Nset, nset=Set-Model, generate
    1,  2016,     1
*Elset, elset=Set-Model, generate
    1,  1518,     1
*Nset, nset=_PickedSet4, internal, generate
    1,  2016,     1
*Elset, elset=_PickedSet4, internal, generate
    1,  1518,     1
*Elset, elset=_Surf-Model_S1, internal, generate
 1381,  1518,     1
*Elset, elset=_Surf-Model_S4, internal, generate
   23,  1518,    23
*Elset, elset=_Surf-Model_S6, internal, generate
    1,  1496,    23
*Elset, elset=_Surf-Model_S3, internal
    1,    2,    3,    4,    5,    6
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*Elset, elset=_Surf-Model_S5, internal
  116,  117,  118,  119,  120,  121
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*Elset, elset=_Surf-Model_S2, internal, generate
   1,  138,    1
*Surface, type=ELEMENT, name=Surf-Model
_Surf-Model_S1, S1
_Surf-Model_S4, S4
_Surf-Model_S6, S6
_Surf-Model_S2, S2
_Surf-Model_S3, S3
_Surf-Model_S5, S5
** Section: Section-Titan
*Solid Section, elset=_PickedSet4, material=Titan
,
*End Part
**
*Part, name=Tool
*Node
      1,          85.,         -20.,           0.
      2,          85.,         -20.,          20.
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*Element, type=R3D4
1,  1,  2, 17, 30
2, 30, 17, 18, 29
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*Element, type=R3D3
289, 384,   8,   6
290, 127, 128,  80
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*Node
    482,           0.,          40.,          20.
*Nset, nset=Tool-RefPt_, internal
482,
*Nset, nset=Set-Tool
 482,
*Elset, elset=_Surf-Tool_SPOS, internal, generate
   1,  505,    1
*Surface, type=ELEMENT, name=Surf-Tool
_Surf-Tool_SPOS, SPOS
*Elset, elset=Tool, generate
   1,  505,    1
*End Part
**
*Part, name=Upper
*Node
      1,         -20.,          85.,          -5.
      2,         -20.,          85.,          25.
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*Element, type=R3D4
 1,   1,  25, 113,  34
 2,  25,  26, 114, 113
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*Element, type=R3D3
 88, 163,   3, 161
 89,  19, 161,  16
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*Node
    201,           0.,          80.,          10.
*Nset, nset=Upper-RefPt_, internal
201,
*Nset, nset=Set-Upper
 201,
*Elset, elset=_Surf-Upper_SPOS, internal, generate
   1,  208,    1
*Surface, type=ELEMENT, name=Surf-Upper
_Surf-Upper_SPOS, SPOS
*Elset, elset=Upper, generate
   1,  208,    1
*End Part
**
*Part, name=UpperPlate
*Node
      1,          90.,   68.3622971,          -5.
      2,          90.,   63.3623009,          -5.
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*Element, type=R3D4
 1,  1,  2,  9, 30
 2, 30,  9, 10, 29
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*Node
     79,           0.,   63.3623009,          10.
*Nset, nset=UpperPlate-RefPt_, internal
79,
*Nset, nset=Set-UpperPlate
 79,
*Elset, elset=_Surf-UpperPlate_SPOS, internal, generate
  1,  76,   1
*Surface, type=ELEMENT, name=Surf-UpperPlate
_Surf-UpperPlate_SPOS, SPOS
*Elset, elset=UpperPlate, generate
  1,  76,   1
*End Part
**
**
** ASSEMBLY
**
*Assembly, name=Assembly
**
*Instance, name=Lower-1, part=Lower
*End Instance
**
*Instance, name=LowerPlate-1, part=LowerPlate
*End Instance
**
*Instance, name=Model-1, part=Model
*End Instance
**
*Instance, name=Tool-1, part=Tool
*End Instance
**
*Instance, name=Upper-1, part=Upper
*End Instance
**
*Instance, name=UpperPlate-1, part=UpperPlate
*End Instance
**
*Rigid Body, ref node=Lower-1.Lower-RefPt_, elset=Lower-1.Lower
*Rigid Body, ref node=LowerPlate-1.LowerPlate-RefPt_, elset=LowerPlate-1.LowerPlate
*Rigid Body, ref node=Tool-1.Tool-RefPt_, elset=Tool-1.Tool
*Rigid Body, ref node=Upper-1.Upper-RefPt_, elset=Upper-1.Upper
*Rigid Body, ref node=UpperPlate-1.UpperPlate-RefPt_, elset=UpperPlate-1.UpperPlate
*End Assembly
*Amplitude, name=Amp-1
             0.,              0.,              1.,              1.
**
** MATERIALS
**
*Material, name=Titan
*Density
 4.5e-09,
*Elastic
112000., 0.32
*Plastic
  1.,  0.
 75., 0.1
125., 0.2
140., 0.3
160., 0.4
165., 0.5
167., 0.6
175.,  1.
**
** INTERACTION PROPERTIES
**
*Surface Interaction, name=IntProp-1
*Friction
 0.36,
** ----------------------------------------------------------------
**
** STEP: Step-1
**
*Step, name=Step-1
*Dynamic, Explicit
, 0.05
*Bulk Viscosity
0.06, 1.2
**
** BOUNDARY CONDITIONS
**
** Name: Fix-Lower Type: Displacement/Rotation
*Boundary, amplitude=Amp-1
Lower-1.Set-Lower, 1, 1
Lower-1.Set-Lower, 3, 3
Lower-1.Set-Lower, 4, 4
Lower-1.Set-Lower, 5, 5
Lower-1.Set-Lower, 6, 6
** Name: Fix-LowerPlate Type: Displacement/Rotation
*Boundary, amplitude=Amp-1
LowerPlate-1.Set-LowerPlate, 1, 1
LowerPlate-1.Set-LowerPlate, 3, 3
LowerPlate-1.Set-LowerPlate, 4, 4
LowerPlate-1.Set-LowerPlate, 5, 5
LowerPlate-1.Set-LowerPlate, 6, 6
** Name: Fix-Tool Type: Displacement/Rotation
*Boundary, amplitude=Amp-1
Tool-1.Set-Tool, 1, 1
Tool-1.Set-Tool, 2, 2
Tool-1.Set-Tool, 3, 3
Tool-1.Set-Tool, 4, 4
Tool-1.Set-Tool, 5, 5
Tool-1.Set-Tool, 6, 6
** Name: Fix-Upper Type: Displacement/Rotation
*Boundary, amplitude=Amp-1
Upper-1.Set-Upper, 1, 1
Upper-1.Set-Upper, 3, 3
Upper-1.Set-Upper, 4, 4
Upper-1.Set-Upper, 5, 5
Upper-1.Set-Upper, 6, 6
** Name: Fix-UpperPlate Type: Displacement/Rotation
*Boundary, amplitude=Amp-1
UpperPlate-1.Set-UpperPlate, 1, 1
UpperPlate-1.Set-UpperPlate, 3, 3
UpperPlate-1.Set-UpperPlate, 4, 4
UpperPlate-1.Set-UpperPlate, 5, 5
UpperPlate-1.Set-UpperPlate, 6, 6
** Name: Load-LoerPlate Type: Displacement/Rotation
*Boundary, amplitude=Amp-1
LowerPlate-1.Set-LowerPlate, 2, 2
** Name: Load-Lower Type: Displacement/Rotation
*Boundary, amplitude=Amp-1
Lower-1.Set-Lower, 2, 2
** Name: Load-Upper Type: Displacement/Rotation
*Boundary, amplitude=Amp-1
Upper-1.Set-Upper, 2, 2, -560.
** Name: Load-UpperPlate Type: Displacement/Rotation
*Boundary, amplitude=Amp-1
UpperPlate-1.Set-UpperPlate, 2, 2
**
** INTERACTIONS
**
** Interaction: Lower
*Contact Pair, interaction=IntProp-1, mechanical constraint=KINEMATIC, cpset=Lower
Lower-1.Surf-Lower, Model-1.Surf-Model
** Interaction: Tool
*Contact Pair, interaction=IntProp-1, mechanical constraint=KINEMATIC, cpset=Tool
Tool-1.Surf-Tool, Model-1.Surf-Model
** Interaction: Upper
*Contact Pair, interaction=IntProp-1, mechanical constraint=KINEMATIC, cpset=Upper
Upper-1.Surf-Upper, Model-1.Surf-Model
**
** OUTPUT REQUESTS
**
*Restart, write, number interval=1, time marks=NO
**
** FIELD OUTPUT: F-Output-1
**
*Output, field, variable=PRESELECT
**
** HISTORY OUTPUT: H-Output-1
**
*Output, history, variable=PRESELECT
*End Step
** ----------------------------------------------------------------
**
** STEP: Step-2
**
*Step, name=Step-2
*Dynamic, Explicit
, 0.05
*Bulk Viscosity
0.06, 1.2
**
** BOUNDARY CONDITIONS
**
** Name: Load-Lower Type: Displacement/Rotation
*Boundary, amplitude=Amp-1
Lower-1.Set-Lower, 2, 2, 560.
** Name: Load-Upper Type: Displacement/Rotation
*Boundary, amplitude=Amp-1
Upper-1.Set-Upper, 2, 2
**
** OUTPUT REQUESTS
**
*Restart, write, number interval=1, time marks=NO
**
** FIELD OUTPUT: F-Output-1
**
*Output, field, variable=PRESELECT
**
** HISTORY OUTPUT: H-Output-1
**
*Output, history, variable=PRESELECT
*End Step
** ----------------------------------------------------------------
**
** STEP: Step-3
**
*Step, name=Step-3
*Dynamic, Explicit
, 0.05
*Bulk Viscosity
0.06, 1.2
**
** BOUNDARY CONDITIONS
**
** Name: Load-Lower Type: Displacement/Rotation
*Boundary, amplitude=Amp-1
Lower-1.Set-Lower, 2, 2
** Name: Load-UpperPlate Type: Displacement/Rotation
*Boundary, amplitude=Amp-1
UpperPlate-1.Set-UpperPlate, 2, 2, -251.246
**
** INTERACTIONS
**
** Interaction: Lower
*Contact Pair, op=DELETE, cpset=Lower
Lower-1.Surf-Lower, Model-1.Surf-Model
** Interaction: LowerPlate
*Contact Pair, interaction=IntProp-1, mechanical constraint=KINEMATIC, cpset=LowerPlate
LowerPlate-1.Surf-LowerPlate, Model-1.Surf-Model
** Interaction: Upper
*Contact Pair, op=DELETE, cpset=Upper
Upper-1.Surf-Upper, Model-1.Surf-Model
** Interaction: UpperPlate
*Contact Pair, interaction=IntProp-1, mechanical constraint=KINEMATIC, cpset=UpperPlate
UpperPlate-1.Surf-UpperPlate, Model-1.Surf-Model
**
** OUTPUT REQUESTS
**
*Restart, write, number interval=1, time marks=NO
**
** FIELD OUTPUT: F-Output-1
**
*Output, field, variable=PRESELECT
**
** HISTORY OUTPUT: H-Output-1
**
*Output, history, variable=PRESELECT
*End Step
** ----------------------------------------------------------------
**
** STEP: Step-4
**
*Step, name=Step-4
*Dynamic, Explicit
, 0.05
*Bulk Viscosity
0.06, 1.2
**
** BOUNDARY CONDITIONS
**
** Name: Load-LoerPlate Type: Displacement/Rotation
*Boundary, amplitude=Amp-1
LowerPlate-1.Set-LowerPlate, 2, 2, 271.194
** Name: Load-UpperPlate Type: Displacement/Rotation
*Boundary, amplitude=Amp-1
UpperPlate-1.Set-UpperPlate, 2, 2
**
** OUTPUT REQUESTS
**
*Restart, write, number interval=1, time marks=NO
**
** FIELD OUTPUT: F-Output-1
**
*Output, field, number interval=30
*Node Output
A, RF, U, V
*Element Output, directions=YES
EVF, LE, PE, PEEQ, PEEQVAVG, PEVAVG, S, SE, SVAVG
*Contact Output
CSTRESS,
**
** HISTORY OUTPUT: H-Output-1
**
*Output, history, variable=PRESELECT
*End Step
