*Heading
** Job name: Job-1 Model name: Model-1
** Generated by: Abaqus/CAE 6.11-3
*Preprint, echo=NO, model=NO, history=NO, contact=NO
**
** PARTS
**
*Part, name=lower
*Node
      1,   19.1183643,  1.93322691e-10,          -5.
      2,   19.1183643,  -4.5767834e-10,          25.
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*Element, type=R3D4
1,  1, 21, 24,  4
2, 21, 22, 23, 24
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*Element, type=R3D3
76, 14,  6,  8
77,  2, 16,  3
96, 15,  1,  4
97,  5, 13,  7
*Node
    161,           0.,           0.,          10.
*Nset, nset=lower-RefPt_, internal
161,
*Nset, nset=Set-Lower
 161,
*Elset, elset=_Surf-Lower_SPOS, internal, generate
   1,  160,    1
*Surface, type=ELEMENT, name=Surf-Lower
_Surf-Lower_SPOS, SPOS
*Elset, elset=lower, generate
   1,  160,    1
*End Part
**
*Part, name=model
*Node
      1,         -20.,          80.,           0.
      2,         -20.,   76.5217361,           0.
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*Element, type=C3D8R
   1,  169,  170,  194,  193,    1,    2,   26,   25
   2,  170,  171,  195,  194,    2,    3,   27,   26
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*Nset, nset=Set-Model, generate
    1,  2016,     1
*Elset, elset=Set-Model, generate
    1,  1518,     1
*Nset, nset=_PickedSet4, internal, generate
    1,  2016,     1
*Elset, elset=_PickedSet4, internal, generate
    1,  1518,     1
*Elset, elset=_Surf-Model_S1, internal, generate
 1381,  1518,     1
*Elset, elset=_Surf-Model_S4, internal, generate
   23,  1518,    23
*Elset, elset=_Surf-Model_S6, internal, generate
    1,  1496,    23
*Elset, elset=_Surf-Model_S3, internal
    1,    2,    3,    4,    5,    6
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*Elset, elset=_Surf-Model_S5, internal
  116,  117,  118,  119,  120,  121
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*Elset, elset=_Surf-Model_S2, internal, generate
   1,  138,    1
*Surface, type=ELEMENT, name=Surf-Model
_Surf-Model_S1, S1
_Surf-Model_S4, S4
_Surf-Model_S6, S6
_Surf-Model_S2, S2
_Surf-Model_S3, S3
_Surf-Model_S5, S5
** Section: Section-Titan
*Solid Section, elset=_PickedSet4, material=Titan
,
*End Part
**
*Part, name=tool
*Node
      1,          85.,         -20.,           0.
      2,          85.,         -20.,          20.
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*Element, type=R3D4
 1,   1,  17, 209,  36
 2,  17,   2,  18, 209
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*Element, type=R3D3
471, 616,  10,   6
472,   3,  14, 171
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*Node
    818,           0.,          40.,           5.
*Nset, nset=tool-RefPt_, internal
818,
*Nset, nset=Set-Tool
 818,
*Elset, elset=_Surf-Tool_SPOS, internal, generate
   1,  878,    1
*Surface, type=ELEMENT, name=Surf-Tool
_Surf-Tool_SPOS, SPOS
*Elset, elset=tool, generate
   1,  878,    1
*End Part
**
*Part, name=upper
*Node
      1,         -20.,          85.,          -5.
      2,         -20.,          85.,          25.
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*Element, type=R3D4
 1,   1,  21, 101,  30
 2,  21,  22, 102, 101
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*Element, type=R3D3
76,  3, 14, 16
77, 12,  2, 10
96, 13,  4, 15
97,  1, 11,  9
*Node
    161,           0.,          80.,          10.
*Nset, nset=upper-RefPt_, internal
161,
*Nset, nset=Set-upper
 161,
*Elset, elset=_Surf-Upper_SPOS, internal, generate
   1,  160,    1
*Surface, type=ELEMENT, name=Surf-Upper
_Surf-Upper_SPOS, SPOS
*Elset, elset=upper, generate
   1,  160,    1
*End Part
**
**
** ASSEMBLY
**
*Assembly, name=Assembly
**
*Instance, name=lower-1, part=lower
*End Instance
**
*Instance, name=model-1, part=model
*End Instance
**
*Instance, name=tool-1, part=tool
*End Instance
**
*Instance, name=upper-1, part=upper
*End Instance
**
*Rigid Body, ref node=lower-1.lower-RefPt_, elset=lower-1.lower
*Rigid Body, ref node=tool-1.tool-RefPt_, elset=tool-1.tool
*Rigid Body, ref node=upper-1.upper-RefPt_, elset=upper-1.upper
*End Assembly
*Amplitude, name=Amp-1
             0.,              0.,              1.,              1.
**
** MATERIALS
**
*Material, name=Titan
*Density
 4.5e-09,
*Elastic
112000., 0.32
*Plastic
  1.,  0.
 75., 0.1
125., 0.2
140., 0.3
160., 0.4
165., 0.5
167., 0.6
175.,  1.
**
** INTERACTION PROPERTIES
**
*Surface Interaction, name=IntProp-1
*Friction
 0.4,
** ----------------------------------------------------------------
**
** STEP: Step-1
**
*Step, name=Step-1
*Dynamic, Explicit
, 0.05
*Bulk Viscosity
0.06, 1.2
**
** BOUNDARY CONDITIONS
**
** Name: Fix-Lower Type: Displacement/Rotation
*Boundary, amplitude=Amp-1
lower-1.Set-Lower, 1, 1
lower-1.Set-Lower, 3, 3
lower-1.Set-Lower, 4, 4
lower-1.Set-Lower, 5, 5
lower-1.Set-Lower, 6, 6
** Name: Fix-Tool Type: Displacement/Rotation
*Boundary, amplitude=Amp-1
tool-1.Set-Tool, 1, 1
tool-1.Set-Tool, 2, 2
tool-1.Set-Tool, 3, 3
tool-1.Set-Tool, 4, 4
tool-1.Set-Tool, 5, 5
tool-1.Set-Tool, 6, 6
** Name: Fix-Upper Type: Displacement/Rotation
*Boundary, amplitude=Amp-1
upper-1.Set-upper, 1, 1
upper-1.Set-upper, 3, 3
upper-1.Set-upper, 4, 4
upper-1.Set-upper, 5, 5
upper-1.Set-upper, 6, 6
** Name: Load-Lower Type: Displacement/Rotation
*Boundary, amplitude=Amp-1
lower-1.Set-Lower, 2, 2
** Name: Load-Upper Type: Displacement/Rotation
*Boundary, amplitude=Amp-1
upper-1.Set-upper, 2, 2, -560.
**
** INTERACTIONS
**
** Interaction: Lower
*Contact Pair, interaction=IntProp-1, mechanical constraint=KINEMATIC, cpset=Lower
lower-1.Surf-Lower, model-1.Surf-Model
** Interaction: Tool
*Contact Pair, interaction=IntProp-1, mechanical constraint=KINEMATIC, cpset=Tool
tool-1.Surf-Tool, model-1.Surf-Model
** Interaction: Upper
*Contact Pair, interaction=IntProp-1, mechanical constraint=KINEMATIC, cpset=Upper
upper-1.Surf-Upper, model-1.Surf-Model
**
** OUTPUT REQUESTS
**
*Restart, write, number interval=1, time marks=NO
**
** FIELD OUTPUT: F-Output-2
**
*Output, field
*Node Output, nset=model-1.Set-Model
COORD,
**
** FIELD OUTPUT: F-Output-1
**
*Output, field, variable=PRESELECT
**
** HISTORY OUTPUT: H-Output-1
**
*Output, history, variable=PRESELECT
*End Step
** ----------------------------------------------------------------
**
** STEP: Step-2
**
*Step, name=Step-2
*Dynamic, Explicit
, 0.05
*Bulk Viscosity
0.06, 1.2
**
** BOUNDARY CONDITIONS
**
** Name: Load-Lower Type: Displacement/Rotation
*Boundary, amplitude=Amp-1
lower-1.Set-Lower, 2, 2, 560.
** Name: Load-Upper Type: Displacement/Rotation
*Boundary, amplitude=Amp-1
upper-1.Set-upper, 2, 2
**
** OUTPUT REQUESTS
**
*Restart, write, number interval=1, time marks=NO
**
** FIELD OUTPUT: F-Output-2
**
*Output, field
*Node Output, nset=model-1.Set-Model
COORD,
**
** FIELD OUTPUT: F-Output-1
**
*Output, field, variable=PRESELECT
**
** HISTORY OUTPUT: H-Output-1
**
*Output, history, variable=PRESELECT
*End Step
